// COMSOL Multiphysics 5.6.0.280 model "Collection_efficiency_calculations_with_nanodiamond_NV_dipole.mph"
// SiC_nanocrystal_HMM
// Outline of the model tree

Parameters
  lambd = 2 [um]  // domain_size
  radius = 20 [nm]
  z_var = 0[nm]
  f0 = c_const/lamb
  lamb = 680 [nm]  // emission_wavelength
  Mesh_max = lamb/8
  Mesh_min = 1 [nm]
  radius_Au = 45[nm]
  t_HMM = 5*(t_d_SiC1+t_m_Ag)
  t_PVA = 2*radius
  n_PVA = 1.5151+0.00279*(sc^2)/(lamb*10^6)^2+5.0756E-4*(sc^4)/(lamb*10^6)^4
  lamb_um = lamb*10^6
  sc = 1[m]
  eps_PVA = (n_PVA)^2
  eps_MGO = 2.956362+0.02195770*(sc^2)/((lambd*10^6)^2-0.01428322*(sc^2))-0.01062387*((lambd*10^6)^2)/(sc^2)-0.0000204968*((lambd*10^6)^4)/(sc^4)
  t_d_SiC1 = 75[nm]
  t_d_ZnS = 30[nm]
  t_m_Au = 10 [nm]
  omega = 2*pi*f0
  h_cross = 6.62607004*10^(-34)
  engy = omega*h_cross
  eps_glass = (1+0.6961663/(1-(0.0684043/lamb_um)^2)+0.4079426/(1-(0.1162414/lamb_um)^2)+0.8974794/(1-(9.896161/lamb_um)^2))/(sc^2)
  L = 10[nm]
  H = (lamb/2)/tan(pi*79.6/180)
  n_SiC = 2.5538+0.0342*(sc^2)/((lamb*10^6)^2)
  eps_SiC = n_SiC^2
  z_sep = 0
  t_m_Au1 = 30[nm]
  t_d_ZnS1 = 30[nm]
  t_m_Au2 = 30[nm]
  t_d_ZnS2 = 30[nm]
  radius_sph = 10 [nm]
  ant_ht = 110 [nm]
  ant_rad = 410 [nm]
  z_far_095NA = r_far/sqrt(1+tan(pi*72/180)^2)
  r_far = 4.25*(height_SiC_cyl/2)
  x_far_095NA = z_far_095NA*tan(pi*72/180)
  n_glass = sqrt(eps_glass)
  mesh_min = 1 [nm]
  mesh_max = 680 [nm]/7.5
  mesh_max_sph = 1.5 [nm]
  del_shift = 0 [nm]
  domain_height = 500 [nm]
  mesh_min_metal = 4 [nm]
  mesh_max_metal = 10 [nm]
  radius_SiC_cyl = 180 [nm]
  height_SiC_cyl = 1.0 [um]
  ht_dipole = height_SiC_cyl - lamb/2
  mesh_max_SiC_cyl = 40 [nm]
  z_far_09NA = r_far/sqrt(1+tan(pi*64.16/180)^2)
  x_far_09NA = z_far_09NA*tan(pi*64.16/180)
  ht_far = ht_dipole
  theta = (0/180)*pi
  del_x = 0 [nm]
  z_NA09 = 5.0 [um]
  del_z_NA = z_NA09 - ht_dipole
  x_NA09 = del_z_NA*tan(pi*64.16/180)
  ht_Ag_antenna = 340 [nm]
  SiC_radius_bottom = 155 [nm]
  SiC_radius_top = SiC_radius_bottom
  middle_layer_thk = 40 [nm]
  cylin_height = 340 [nm]
  metal_reflector_ht = 100 [nm]
  height_top_domain = 2.5*680 [nm]
  n_antenna = 2.4
  eps_antenna = n_antenna^2
  n_diamond = 2.4
  eps_diamond = n_diamond^2

Functions
  int1: Interpolation
    importedname = permittivity_real_Au_J_C_nm.txt
    funcs = {eps_real, 1}
    funcname = eps_real_Ag
    table = 
      {1.879e-007, -0.32404}
      {1.916e-007, -0.30782}
      {1.953e-007, -0.32062}
      {1.993e-007, -0.33113}
      {2.033e-007, -0.35712}
      {2.073e-007, -0.32894}
      {2.119e-007, -0.31563}
      {2.164e-007, -0.2965}
      {2.214e-007, -0.23846}
      {2.262e-007, -0.21874}
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    interp = cubicspline
    extrap = linear
    argunit = m
    fununit = 1
  int2: Interpolation
    importedname = permittivity_imag_Au_J_C_nm.txt
    funcs = {eps_imag, 1}
    funcname = eps_imag_Ag
    table = 
      {1.879e-007, 2.5937}
      {1.916e-007, 2.7104}
      {1.953e-007, 2.8112}
      {1.993e-007, 2.9116}
      {2.033e-007, 2.9808}
      {2.073e-007, 3.0963}
      {2.119e-007, 3.18}
      {2.164e-007, 3.2598}
      {2.214e-007, 3.355}
      {2.262e-007, 3.3869}
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    interp = cubicspline
    extrap = linear
    argunit = m
    fununit = 1
  int3: Interpolation
    funcname = eps_real_SiC
    table = 
      {1.008e-007, -1.9496}
      {1.0468e-007, -2.0671}
      {1.0876e-007, -2.2234}
      {1.1337e-007, -2.3644}
      {1.1986e-007, -2.4422}
      {1.2782e-007, -2.3963}
      {1.3776e-007, -2.2909}
      {1.4903e-007, -2.0819}
      {1.5482e-007, -1.9828}
      {1.5982e-007, -1.7864}
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    interp = cubicspline
    extrap = linear
    argunit = m
    fununit = 1
  int4: Interpolation
    funcname = eps_imag_SiC
    table = 
      {1.008e-007, 2.0009}
      {1.0468e-007, 2.3285}
      {1.0876e-007, 2.6886}
      {1.1337e-007, 3.1553}
      {1.1986e-007, 3.8405}
      {1.2782e-007, 4.6248}
      {1.3776e-007, 5.5803}
      {1.4903e-007, 6.6571}
      {1.5482e-007, 7.3084}
      {1.5982e-007, 7.906}
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    interp = cubicspline
    extrap = linear
    argunit = m
    fununit = 1
  int5: Interpolation
    funcs = {eps_AlN_imag, 1}
    funcname = eps_real_Si
    table = 
      {2.638e-007, -12.362}
      {2.652e-007, -12.824}
      {2.666e-007, -13.058}
      {2.681e-007, -13.571}
      {2.695e-007, -13.885}
      {2.71e-007, -14.476}
      {2.725e-007, -14.64}
      {2.74e-007, -15.098}
      {2.755e-007, -15.497}
      {2.771e-007, -15.634}
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    interp = cubicspline
    extrap = linear
    argunit = m
    fununit = 1
  int7: Interpolation
    funcs = {eps_TiN_imag, 1}
    funcname = eps_imag_Si
    table = 
      {2.638e-007, 16.16}
      {2.652e-007, 16.641}
      {2.666e-007, 17.189}
      {2.681e-007, 17.715}
      {2.695e-007, 18.649}
      {2.71e-007, 19.36}
      {2.725e-007, 20.266}
      {2.74e-007, 21.388}
      {2.755e-007, 22.613}
      {2.771e-007, 23.704}
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    interp = cubicspline
    extrap = linear
    argunit = m
    fununit = 1
  int8: Interpolation
    funcname = eps_real_Au
    table = 
      {3.009e-007, -1.2274}
      {3.107e-007, -1.2425}
      {3.204e-007, -1.2308}
      {3.315e-007, -1.3553}
      {3.425e-007, -1.3102}
      {3.542e-007, -1.232}
      {3.679e-007, -1.4006}
      {3.815e-007, -1.6049}
      {3.974e-007, -1.6494}
      {4.133e-007, -1.7022}
      {4.305e-007, -1.6922}
      {4.509e-007, -1.759}
      {4.714e-007, -1.7027}
      {4.959e-007, -2.2783}
      {5.209e-007, -3.9462}
      {5.486e-007, -5.8421}
      {5.821e-007, -8.1127}
      {6.168e-007, -10.662}
      {6.595e-007, -13.648}
      {7.045e-007, -16.818}
      {7.56e-007, -20.61}
      {8.211e-007, -25.811}
      {8.92e-007, -32.041}
      {9.84e-007, -40.274}
      {1.088e-006, -51.05}
    interp = cubicspline
    extrap = linear
    argunit = m
    fununit = 1
  int9: Interpolation
    funcname = eps_imag_Au
    table = 
      {3.009e-007, 5.7803}
      {3.107e-007, 5.7926}
      {3.204e-007, 5.8458}
      {3.315e-007, 5.5737}
      {3.425e-007, 5.5382}
      {3.542e-007, 5.598}
      {3.679e-007, 5.6092}
      {3.815e-007, 5.6444}
      {3.974e-007, 5.7389}
      {4.133e-007, 5.7174}
      {4.305e-007, 5.6492}
      {4.509e-007, 5.2826}
      {4.714e-007, 4.8444}
      {4.959e-007, 3.8126}
      {5.209e-007, 2.5804}
      {5.486e-007, 2.1113}
      {5.821e-007, 1.6605}
      {6.168e-007, 1.3742}
      {6.595e-007, 1.0352}
      {7.045e-007, 1.0668}
      {7.56e-007, 1.2718}
      {8.211e-007, 1.6266}
      {8.92e-007, 1.9254}
      {9.84e-007, 2.794}
      {1.088e-006, 3.861}
    interp = cubicspline
    extrap = linear
    argunit = m
    fununit = 1
  int10: Interpolation
    funcname = eps_real_ZnS
    table = 
      {4.05e-007, 6.469}
      {4.193e-007, 6.3318}
      {4.341e-007, 6.2124}
      {4.494e-007, 6.1079}
      {4.653e-007, 6.0154}
      {4.817e-007, 5.9338}
      {4.987e-007, 5.861}
      {5.163e-007, 5.796}
      {5.345e-007, 5.7377}
      {5.534e-007, 5.6851}
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    argunit = m
    fununit = 1
  int11: Interpolation
    funcname = eps_imag_ZnS
    table = 
      {4.05e-007, 0}
      {4.193e-007, 0}
      {4.341e-007, 0}
      {4.494e-007, 0}
      {4.653e-007, 0}
      {4.817e-007, 0}
      {4.987e-007, 0}
      {5.163e-007, 0}
      {5.345e-007, 0}
      {5.534e-007, 0}
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    argunit = m
    fununit = 1

Variables
  var1 "Variables 1"

Coordinate systems
  pml1: PML "Perfectly Matched Layer 1" (disabled) on domains 2 | ScalingType = Cylindrical; r0 = {0, 0, -radius}

Geometry
  geom1 "Geometry 1" (3D, length unit m)
    sph1: Sphere | pos = {del_x, 0, ht_dipole}; axistype = spherical; r = radius_sph
    pt1: Point | p = {del_x, 0, ht_dipole}
    cone1: Cone "SiC cone" (disabled)
      r = SiC_radius_bottom
      h = height_SiC_cyl
      specifytop = radius
      rtop = SiC_radius_top
    cone2: Cone "PMMA cylind middle_layer"
      pos = {0, 0, ht_dipole - middle_layer_thk/2}
      r = SiC_radius_bottom
      h = middle_layer_thk
      specifytop = radius
      rtop = SiC_radius_top
    cone3: Cone "Top_cylind antenna"
      pos = {0, 0, ht_dipole + middle_layer_thk/2}
      r = SiC_radius_bottom
      h = cylin_height
      specifytop = radius
      rtop = SiC_radius_top
    cone4: Cone "Bottom_cylind_antenna"
      pos = {0, 0, ht_dipole - middle_layer_thk/2 - cylin_height}
      r = SiC_radius_bottom
      h = cylin_height
      specifytop = radius
      rtop = SiC_radius_top
    cyl20: Cylinder "SiC_cylinder" (disabled) | r = radius_SiC_cyl; h = height_SiC_cyl
    cyl21: Cylinder "Ag_cylinder_antenna" (disabled) | pos = {0, 0, height_SiC_cyl}; r = radius_SiC_cyl; h = ht_Ag_antenna
    blk3: Block "Bottom_metal_reflector_layer"
      pos = {-lambd, -lambd, ht_dipole - middle_layer_thk/2 - cylin_height - metal_reflector_ht}
      size = {2*lambd, 2*lambd, metal_reflector_ht}
    blk6: Block "Bottom_substrate"
      pos = {-lambd, -lambd, ht_dipole - middle_layer_thk/2 - cylin_height - metal_reflector_ht - domain_height}
      size = {2*lambd, 2*lambd, domain_height}
    blk4: Block "Top_domain_air"
      pos = {-lambd, -lambd, ht_dipole - middle_layer_thk/2 - cylin_height}
      size = {2*lambd, 2*lambd, height_top_domain}
    sph2: Sphere "sph_far" | pos = {0, 0, ht_far}; r = r_far
    wp1: WorkPlane | quickz = z_far_09NA + ht_far; unite = on
      c1: Circle | r = x_far_09NA
    int2: Intersection | input = sph2, wp1
    wp2: WorkPlane (disabled) | quickz = z_NA09; unite = on
      c1: Circle | r = x_NA09
    int3: Intersection (disabled) | input = blk4, wp2
    blk5: Block "Top_domain_air 1" (disabled) | pos = {-lambd, -lambd, 0}; size = {2*lambd, 2*lambd, 1.2*height_SiC_cyl}
    cyl2: Cylinder "PVA_capping_layer" (disabled)
      pos = {0, 0, -radius}
      layername = Layer 1
      layer = lambd/2
      layerside = off
      r = lambd/2+lambd/2
      h = t_PVA
    cyl3: Cylinder "Au_bottom_layer" (disabled)
      pos = {0, 0, -(t_m_Au+radius)}
      layername = Layer 1
      layer = lambd/2
      layerside = off
      r = lambd/2+lambd/2
      h = t_m_Au
    blk1: Block "Au_layer" (disabled)
      pos = {-lambd, -lambd, -(t_m_Au+radius)}
      size = {2*lambd - del_shift, 2*lambd + del_shift, t_m_Au}
    cyl4: Cylinder "Au_top_layer" (disabled)
      pos = {0, 0, radius}
      layername = Layer 1
      layer = lambd/2
      layerside = off
      r = lambd/2+lambd/2
      h = t_m_Au
    cyl6: Cylinder "ZnS_bottom_layer" (disabled)
      pos = {0, 0, -(radius + t_m_Au + t_d_ZnS)}
      layername = Layer 1
      layer = lambd/2
      layerside = off
      r = lambd/2+lambd/2
      h = t_d_ZnS
    cyl7: Cylinder "ZnS_top_layer" (disabled)
      pos = {0, 0, radius + t_m_Au}
      layername = Layer 1
      layer = lambd/2
      layerside = off
      r = lambd/2+lambd/2
      h = t_d_ZnS
    cyl16: Cylinder "antenna_centre" (disabled) | pos = {0, 0, radius+2*t_m_Au}; layerside = off; r = ant_rad; h = ant_ht
    cyl17: Cylinder "antenna_right" (disabled) | pos = {lambd/4, 0, radius+2*t_m_Au}; r = ant_rad; h = ant_ht
    cyl18: Cylinder "antenna_left" (disabled) | pos = {-lambd/4, 0, radius+2*t_m_Au}; r = ant_rad; h = ant_ht
    cyl15: Cylinder "top_lambd_cyld_domain" (disabled)
      pos = {0, 0, -radius}
      layername = Layer 1
      layer = lambd/2
      layerside = off
      r = lambd/2+lambd/2
      h = lambd/2+lambd/2
    blk2: Block "Top_domain" (disabled)
      pos = {-lambd, -lambd, -radius}
      size = {2*lambd - del_shift, 2*lambd + del_shift, domain_height}
    cyl8: Cylinder "bottom_lambd_cyld_domain" (disabled)
      pos = {0, 0, -(lambd/2+lambd/2+radius)}
      layername = Layer 1
      layer = lambd/2
      layerside = off
      r = lambd/2+lambd/2
      h = lambd/2+lambd/2
    cyl19: Cylinder (disabled) | pos = {0, 0, z_far_095NA-20[nm]}; r = x_far_095NA; h = 20 [nm]
    int1: Intersection (disabled) | input = cyl19, 
    sph3: Sphere "sph_far 1" (disabled) | r = r_far
    fin: Finalize "Form Union"

Materials
  mat1: Common "Air" on domains 3
    def "Basic"
      relpermittivity = 1
      relpermeability = 1
      electricconductivity = 0
  mat2: Common "Diamond" on domains 7
    def "Basic"
      relpermittivity = eps_diamond
      electricconductivity = 0
      relpermeability = 1
  mat3: Common "Ag_Antenna" on domains 4, 6
    def "Basic"
      electricconductivity = 0
      relpermittivity = eps_antenna
      relpermeability = 1
  mat6: Common "PVA" on domains 5
    def "Basic"
      relpermeability = 1
      electricconductivity = 0
      relpermittivity = eps_PVA
  mat5: Common "Glass" on domains 1, 2
    def "Basic"
      electricconductivity = 0
      relpermeability = 1
      relpermittivity = eps_glass

Physics
  emw: ElectromagneticWaves on all domains
    dependent variable E = {Ex, Ey, Ez}
    MeshControl.SizeControlParameter = Wavelength
    MeshControl.PhysicsControlledMeshMaximumElementSize = lambd/10
    MeshControl.PhysicsControlledMeshMinimumWavelength = lambd/6
    MeshControl.ResolveWaveInLossyMedia = 0
    MeshControl.EnableMeshControl = true
    wee1: WaveEquationElectric (default)
      epsilonr_mat = from_mat
      n_mat = userdef
      n = n_SiC
      ki_mat = userdef
      ki = 0
      DisplacementFieldModel = RelativePermittivity
    pec1: PerfectElectricConductor (default)
    init1: init "Initial Values 1" (default)
    wee3: WaveEquationElectric "Wave Equation, Electric (Ag)" (disabled) on domains 2
      epsilonr_mat = userdef
      epsilonr = eps_real_Ag(lamb)-i*eps_imag_Ag(lamb)
    wee4: WaveEquationElectric "Wave Equation, Electric (Ag2)" on domains 4, 6
      epsilonr_mat = userdef
      epsilonr = eps_real_Ag(lamb)-i*eps_imag_Ag(lamb)
      minput_frequency = root.freq
    pec2: PerfectElectricConductor (disabled) on boundaries 9, 17
    init3: init "Initial Values 3" (disabled) on no domains
    epd1: ElectricPointDipole on points 22
      DipoleSpecification = MagnitudeAndDirection
      pI = {0, 0, 1}
      normpI = 1
      enpI = {sin(theta), 0, cos(theta)}
    sctr2: Scattering "Scattering Boundary Condition 2" on boundaries 1-5, 7, 8, 10-13, 39-41
      WaveType = PlaneWave
      Order = SecondOrder
    ffd1: FarFieldDomain on domains 3
      ffc1: FarFieldCalculation on boundaries 1-3, 7-11, 13, 17, 39, 41

Mesh
  mesh1 "Mesh 1"
    size: MeshSizeDefault
      hmax = mesh_max
      hmin = mesh_min
      hcurve = 0.4
      hnarrow = 0.6
      hgrad = 1.3
      hauto = 3
      custom = on
    size1: Size "Size_sphere" on domains 7 | hmax = mesh_max_sph; hmin = mesh_min; hgrad = 1.3; hauto = 3; custom = on
    size2: Size "Size_SiC_rod" on domains 4-6
      hmax = mesh_max_SiC_cyl
      hmin = mesh_min
      hnarrow = 0.6
      hgrad = 1.2
      hauto = 3
      custom = on
    size5: Size "Size_air" on domains 3 | hmax = mesh_max; hmin = mesh_max_sph; hgrad = 1.3; custom = on
    size4: Size "Bottom_substrate" on domains 1, 2 | hmax = mesh_max; hmin = mesh_max_sph; hgrad = 1.3; custom = on
    ftri1: FreeTri "Free Triangular 1" on boundaries 9, 14, 17
    ftet1: FreeTet "Free Tetrahedral 1" on all domains
    size3: Size (disabled) on no domains | hmax = 30 [nm]; hmin = 0.75[nm]; hauto = 3; custom = on
    size6: Size (disabled) on no boundaries | hmax = 3[nm]; hmin = 1[nm]; custom = on
    dis1: Distribution (disabled) on no edges
    swe1: Sweep "Swept 1" (disabled) on no domains
      dis1: Distribution on no domains

Studies
  std1 "Study 1"
    param: Parametric "Parametric Sweep" | pname = lamb; plistarr = range(600 [nm],2.5 [nm],800 [nm]); punit = m
    freq: Frequency "Frequency Domain" | punit = Hz; plist = f0

Solver configurations
  sol1 "Solver 1" (study std1)
    v1: Variables "Dependent Variables 1"
    s1: Stationary "Stationary Solver 1"
      p1: Parametric | pname = freq
      fc1: FullyCoupled | linsolver = i1
      i1: Iterative | linsolver = bicgstab; nlinnormuse = on; nlinnormlevel = 0.1
        mg1: Multigrid
  sol2 "Parametric Solutions 1" (study std1)

Datasets
  dset1: Solution | solution = sol1
  dset2: Solution | solution = sol2
  int1_ds1: Grid2D | function = int1; parmin1 = 0.3009; parmax1 = 1.088; parmin2 = -51.05; parmax2 = -1.2274
  surf1: Surface | data = dset1

Derived values
  int1: IntSurface "Surface Integration 1" on boundaries 25-28, 32-35
    data = dset2
    table = tbl1
    expr = emw.nPoav
    descr = Power outflow, time average
  int2: IntSurface "Surface Integration 2" on boundaries 14
    data = dset2
    table = tbl2
    expr = emw.nPoav
    descr = Power outflow, time average
  int3: IntSurface "Surface Integration 3" on boundaries 7-10, 13, 17, 41
    data = dset2
    table = tbl2
    expr = emw.nPoav
    descr = Power outflow, time average
  int4: IntSurface "Surface Integration 4" on boundaries 18-20, 23, 30, 37
    data = dset2
    table = tbl2
    expr = emw.nPoav
    descr = Power outflow, time average
  int5: IntSurface "Surface Integration 5"
    data = dset2
    table = tbl2
    expr = emw.nPoav
    descr = Power outflow, time average

Tables
  tbl1: Table
    // Surface Integration 1 (emw.nPoav)
    lamb (m) | freq (Hz) | Power outflow, time average (W)
    6e-07 | 4.99654e+14 | 9.43014e+15
    6.025e-07 | 4.97581e+14 | 1.0168e+16
    6.05e-07 | 4.95525e+14 | 1.10392e+16
    6.075e-07 | 4.93486e+14 | 1.20516e+16
    6.1e-07 | 4.91463e+14 | 1.31918e+16
    6.125e-07 | 4.89457e+14 | 1.44329e+16
    6.15e-07 | 4.87467e+14 | 1.59583e+16
    6.175e-07 | 4.85494e+14 | 1.75662e+16
    6.2e-07 | 4.83536e+14 | 1.94828e+16
    6.225e-07 | 4.81594e+14 | 2.17005e+16
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  tbl2: Table
    // Surface Integration 2 (emw.nPoav)
    lamb (m) | freq (Hz) | Power outflow, time average (W)
    6e-07 | 4.99654e+14 | 7.57225e+15
    6.025e-07 | 4.97581e+14 | 8.15417e+15
    6.05e-07 | 4.95525e+14 | 8.84616e+15
    6.075e-07 | 4.93486e+14 | 9.65253e+15
    6.1e-07 | 4.91463e+14 | 1.05592e+16
    6.125e-07 | 4.89457e+14 | 1.15443e+16
    6.15e-07 | 4.87467e+14 | 1.27662e+16
    6.175e-07 | 4.85494e+14 | 1.40557e+16
    6.2e-07 | 4.83536e+14 | 1.56114e+16
    6.225e-07 | 4.81594e+14 | 1.74107e+16
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
Plots
  pg1: PlotGroup3D "3D Plot Group 1" | data = dset2
    surf1: Surface | data = dset2; expr = emw.nPoav; descr = Power outflow, time average
  pg2: PlotGroup3D "3D Plot Group 2" | data = dset1
    ff1: RadiationPattern "Far Field 1"
      data = dset2
      expr = emw.normEfar
      descr = Far-field norm
      thetadisc = 60
      phidisc = 60
  pg3: PlotGroup3D "Electric Field (emw)" | data = dset2
    mslc1: Multislice
      data = dset2
      expr = sqrt(emw.Poavx^2+emw.Poavy^2+emw.Poavz^2)
      ynumber = 0
      znumber = 0
      zcoord = 0
  pg4: PlotGroup1D "1D Plot Group 4" | data = none
    tblp1: Table "Table Graph 1" | table = tbl2
    ff1: RadiationPattern "Far Field 1" | expr = mod1.emw.normEfar; anglerestr = manual
  pg5: PlotGroup2D "2D Plot Group 5" | data = none; title = eps_real(x,y)
    plot1: Surface | data = int1_ds1; expr = eps_real(root.x,root.y); descr = eps_real(x,y)
      height1: Height "Height Expression 1" | expr = mod1.emw.normE
  pg6: PolarGroup "Polar Plot Group 6" | data = dset2
    ff1: RadiationPattern "Far Field 1"
      data = dset2
      expr = emw.normEfar^2
      phidisc = 180
      anglerestr = manual
      normal = {0, -1, 0}
  pg7: PlotGroup1D "1D Plot Group 7" | data = none
    tblp1: Table "Table Graph 1" | table = tbl1; xaxisdata = 1; plotcolumninput = manual; plotcolumns = 3
  pg8: PlotGroup1D "1D Plot Group 8" | data = none
    tblp1: Table "Table Graph 1" | table = tbl2; xaxisdata = 1; plotcolumninput = manual; plotcolumns = 3

Exports
  plot1: Plot
    filename = D:\Updated_documents\Documents\Research paper writeup\Half_wavelength_antenna_design\Calculated_rates\With_Ag_pillar_Ag_reflector\Radiation_pattern\Ag_cylinder_ht_170nm_Power_outflow_time_average.txt
  plot2: Plot
    filename = D:\Updated_documents\Documents\Research paper writeup\Half_wavelength_antenna_design\Calculated_rates\With_Ag_pillar_Ag_reflector\Radiation_pattern\Ag_cylinder_ht_170nm.txt