// COMSOL Multiphysics 5.6.0.280 model "Scattering_efficiency_and_phase_calculations.mph"
// Outline of the model tree

Parameters
  rdisk = 0.225[um]
  hdisk = 0.4[um]
  R = 1.55 [um]
  n_PVA = 1.5151+0.00279*(sc^2)/(lamb*10^6)^2+5.0756E-4*(sc^4)/(lamb*10^6)^4
  sc = 1[m]
  lamb = 680 [nm]
  t_PVA = 38 [nm]
  eps_PVA = (n_PVA)^2
  ht_Ag_antenna = 340 [nm]
  rad_Ag_antenna = 155 [nm]
  mesh_max = lamb/8
  mesh_min = t_PVA/20
  eps_Ag = eps_real_Ag(lamb)-i*eps_imag_Ag(lamb)
  n_Ag = N_Ag(lamb)
  k_Ag = K_Ag(lamb)
  lamb_um = lamb*1e6
  rad_diam = 15 [nm]

Functions
  an1: Analytic "jn" | funcname = jn; expr = sqrt(pi/2/x)*besselj(n+0.5,x); args = {n, x}; argunit = 1, 1; fununit = 1
  int1: Interpolation
    funcname = eps_imag_Ag
    table = 
      {1.879e-007, 2.5937}
      {1.916e-007, 2.7104}
      {1.953e-007, 2.8112}
      {1.993e-007, 2.9116}
      {2.033e-007, 2.9808}
      {2.073e-007, 3.0963}
      {2.119e-007, 3.18}
      {2.164e-007, 3.2598}
      {2.214e-007, 3.355}
      {2.262e-007, 3.3869}
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    interp = cubicspline
    extrap = linear
    argunit = m
    fununit = 1
  int2: Interpolation
    funcname = eps_real_Ag
    table = 
      {1.879e-007, -0.32404}
      {1.916e-007, -0.30782}
      {1.953e-007, -0.32062}
      {1.993e-007, -0.33113}
      {2.033e-007, -0.35712}
      {2.073e-007, -0.32894}
      {2.119e-007, -0.31563}
      {2.164e-007, -0.2965}
      {2.214e-007, -0.23846}
      {2.262e-007, -0.21874}
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    interp = cubicspline
    extrap = linear
    argunit = m
    fununit = 1
  int3: Interpolation
    funcname = N_Ag
    table = 
      {0.1879, 1.07}
      {0.1916, 1.10}
      {0.1953, 1.12}
      {0.1993, 1.14}
      {0.2033, 1.15}
      {0.2073, 1.18}
      {0.2119, 1.20}
      {0.2164, 1.22}
      {0.2214, 1.25}
      {0.2262, 1.26}
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    interp = cubicspline
    extrap = linear
    argunit = um
    fununit = 1
  int4: Interpolation
    funcname = K_Ag
    table = 
      {0.1879, 1.212}
      {0.1916, 1.232}
      {0.1953, 1.255}
      {0.1993, 1.277}
      {0.2033, 1.296}
      {0.2073, 1.312}
      {0.2119, 1.325}
      {0.2164, 1.336}
      {0.2214, 1.342}
      {0.2262, 1.344}
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    interp = cubicspline
    extrap = linear
    argunit = um
    fununit = 1

Variables
  var1 "Variables 1"
    k = ewfd.k0
    r = sqrt(x^2+y^2+z^2)
    kr = k*r
    Px = ewfd.Px
    Py = ewfd.Py
    Pz = ewfd.Pz
    iw = ewfd.iomega
    rdP = x*Px+y*Py+z*Pz
    EDx = Px*jn(0,kr)+k^2/2*(3*rdP*x-Px*r^2)*jn(2,kr)/kr^2
    EDy = Py*jn(0,kr)+k^2/2*(3*rdP*y-Py*r^2)*jn(2,kr)/kr^2
    EDz = Pz*jn(0,kr)+k^2/2*(3*rdP*z-Pz*r^2)*jn(2,kr)/kr^2
    rcp_x = y*Pz-z*Py
    rcp_y = z*Px-x*Pz
    rcp_z = x*Py-y*Px
    MDx = -3/2*iw*rcp_x*jn(1,kr)/kr
    MDy = -3/2*iw*rcp_y*jn(1,kr)/kr
    MDz = -3/2*iw*rcp_z*jn(1,kr)/kr
    EQxx = 3*( (3*(x*Px+x*Px)-2*rdP)*jn(1,kr)/kr + 2*k^2*jn(3,kr)/kr^3*(5*x*x*rdP-r^2*(x*Px+x*Px)-r^2*rdP) )
    EQyy = 3*( (3*(y*Py+y*Py)-2*rdP)*jn(1,kr)/kr + 2*k^2*jn(3,kr)/kr^3*(5*y*y*rdP-r^2*(y*Py+y*Py)-r^2*rdP) )
    EQzz = 3*( (3*(z*Pz+z*Pz)-2*rdP)*jn(1,kr)/kr + 2*k^2*jn(3,kr)/kr^3*(5*z*z*rdP-r^2*(z*Pz+z*Pz)-r^2*rdP) )
    EQyz = 3*( (3*(y*Pz+z*Py))*jn(1,kr)/kr + 2*k^2*jn(3,kr)/kr^3*(5*y*z*rdP-r^2*(y*Pz+z*Py)) )
    EQxz = 3*( (3*(x*Pz+z*Px))*jn(1,kr)/kr + 2*k^2*jn(3,kr)/kr^3*(5*x*z*rdP-r^2*(x*Pz+z*Px)) )
    EQxy = 3*( (3*(x*Py+y*Px))*jn(1,kr)/kr + 2*k^2*jn(3,kr)/kr^3*(5*x*y*rdP-r^2*(x*Py+y*Px)) )
    MQxx = -iw*15*(2*x*(y*Pz-z*Py))*jn(2,kr)/kr^2
    MQyy = -iw*15*(2*y*(z*Px-x*Pz))*jn(2,kr)/kr^2
    MQzz = -iw*15*(2*z*(x*Py-y*Px))*jn(2,kr)/kr^2
    MQyz = -iw*15*(y*(x*Py-y*Px)+z*(z*Px-x*Pz))*jn(2,kr)/kr^2
    MQxz = -iw*15*(x*(x*Py-y*Px)+z*(y*Pz-z*Py))*jn(2,kr)/kr^2
    MQxy = -iw*15*(x*(z*Px-x*Pz)+y*(y*Pz-z*Py))*jn(2,kr)/kr^2  // “
  var2 "Variables 2"
    p_sq = abs(intop1(EDx))^2+abs(intop1(EDy))^2+abs(intop1(EDz))^2
    m_sq = (abs(intop1(MDx))^2+abs(intop1(MDy))^2+abs(intop1(MDz))^2)/c_const^2
    eq_sq = (abs(intop1(EQxx))^2+abs(intop1(EQyy))^2+abs(intop1(EQzz))^2+2*(abs(intop1(EQyz))^2+abs(intop1(EQxz))^2+abs(intop1(EQxy))^2))*k^2
    mq_sq = (abs(intop1(MQxx))^2+abs(intop1(MQyy))^2+abs(intop1(MQzz))^2+2*(abs(intop1(MQyz))^2+abs(intop1(MQxz))^2+abs(intop1(MQxy))^2))*k^2/c_const^2  // “
    arg_p = arg(conj(intop1(EDx)))
    arg_m = arg(-conj(intop1(MDy/c_const)))
    arg_eq = arg(-conj(intop1(EQxz)*k/(6*i)))
    arg_mq = arg(conj(intop1(MQyz*k/(2*i*c_const))))

Couplings
  intop1: Integration on domains 2, 4

Geometry
  geom1 "Geometry 1" (3D, length unit m)
    cyl1: Cylinder "Cylinder PVA" | pos = {0, 0, -t_PVA/2}; r = rad_Ag_antenna; h = t_PVA
    sph2: Sphere "Diamond" | r = rad_diam
    cyl2: Cylinder "Ag_top_cyl" | pos = {0, 0, t_PVA/2}; r = rad_Ag_antenna; h = ht_Ag_antenna
    cyl3: Cylinder "Ag_bottom_cyl" | pos = {0, 0, -(ht_Ag_antenna+t_PVA/2)}; r = rad_Ag_antenna; h = ht_Ag_antenna
    sph1: Sphere | r = R
    fin: Finalize "Form Union"

Materials
  mat1: Common "Air" on domains 1
    def "Basic"
      thermalexpansioncoefficient = alpha_p(pA,T)
      molarmass = 0.02897[kg/mol]
      bulkviscosity = muB(T)
      relpermeability = 1
      relpermittivity = 1
      dynamicviscosity = eta(T)
      ratioofspecificheat = 1.4
      electricconductivity = 0[S/m]
      heatcapacity = Cp(T)
      density = rho(pA,T)
      thermalconductivity = k(T)
      soundspeed = cs(T)
      eta: Piecewise | arg = T; pieces = {200.0, 1600.0, -8.38278E-7+8.35717342E-8*T^1-7.69429583E-11*T^2+4.6437266E-14*T^3-1.06585607E-17*T^4}; argunit = K; fununit = Pa*s
      Cp: Piecewise | arg = T; pieces = {200.0, 1600.0, 1047.63657-0.372589265*T^1+9.45304214E-4*T^2-6.02409443E-7*T^3+1.2858961E-10*T^4}; argunit = K; fununit = J/(kg*K)
      rho: Analytic | expr = pA*0.02897/R_const[K*mol/J]/T; args = {pA, T}; argunit = Pa,K; fununit = kg/m^3
      k: Piecewise | arg = T; pieces = {200.0, 1600.0, -0.00227583562+1.15480022E-4*T^1-7.90252856E-8*T^2+4.11702505E-11*T^3-7.43864331E-15*T^4}; argunit = K; fununit = W/(m*K)
      cs: Analytic | expr = sqrt(1.4*R_const[K*mol/J]/0.02897*T); args = T; argunit = K; fununit = m/s
      an1: Analytic | funcname = alpha_p; expr = -1/rho(pA,T)*d(rho(pA,T),T); args = {pA, T}; argunit = Pa,K; fununit = 1/K
      an2: Analytic "Analytic 2a" | funcname = muB; expr = 0.6*eta(T); args = T; argunit = K; fununit = Pa*s
    RefractiveIndex
      n = 1
      ki = 0
    NonlinearModel
      BA = (def.gamma+1)/2
    idealGas
      Rs = R_const/Mn
      heatcapacity = Cp(T)
      ratioofspecificheat = 1.4
      molarmass = 0.02897
      Cp: Piecewise | arg = T; pieces = {200.0, 1600.0, 1047.63657-0.372589265*T^1+9.45304214E-4*T^2-6.02409443E-7*T^3+1.2858961E-10*T^4}; argunit = K; fununit = J/(kg*K)
  mat3: Common "PVA" on domains 3, 5
    def "Basic"
      thermalexpansioncoefficient = alpha_p(pA,T)
      molarmass = 0.02897[kg/mol]
      bulkviscosity = muB(T)
      relpermeability = 1
      relpermittivity = 1
      dynamicviscosity = eta(T)
      ratioofspecificheat = 1.4
      electricconductivity = 0[S/m]
      heatcapacity = Cp(T)
      density = rho(pA,T)
      thermalconductivity = k(T)
      soundspeed = cs(T)
      eta: Piecewise | arg = T; pieces = {200.0, 1600.0, -8.38278E-7+8.35717342E-8*T^1-7.69429583E-11*T^2+4.6437266E-14*T^3-1.06585607E-17*T^4}; argunit = K; fununit = Pa*s
      Cp: Piecewise | arg = T; pieces = {200.0, 1600.0, 1047.63657-0.372589265*T^1+9.45304214E-4*T^2-6.02409443E-7*T^3+1.2858961E-10*T^4}; argunit = K; fununit = J/(kg*K)
      rho: Analytic | expr = pA*0.02897/R_const[K*mol/J]/T; args = {pA, T}; argunit = Pa,K; fununit = kg/m^3
      k: Piecewise | arg = T; pieces = {200.0, 1600.0, -0.00227583562+1.15480022E-4*T^1-7.90252856E-8*T^2+4.11702505E-11*T^3-7.43864331E-15*T^4}; argunit = K; fununit = W/(m*K)
      cs: Analytic | expr = sqrt(1.4*R_const[K*mol/J]/0.02897*T); args = T; argunit = K; fununit = m/s
      an1: Analytic | funcname = alpha_p; expr = -1/rho(pA,T)*d(rho(pA,T),T); args = {pA, T}; argunit = Pa,K; fununit = 1/K
      an2: Analytic "Analytic 2a" | funcname = muB; expr = 0.6*eta(T); args = T; argunit = K; fununit = Pa*s
    RefractiveIndex
      n = 1.52
      ki = 0
    NonlinearModel
      BA = (def.gamma+1)/2
    idealGas
      Rs = R_const/Mn
      heatcapacity = Cp(T)
      ratioofspecificheat = 1.4
      molarmass = 0.02897
      Cp: Piecewise | arg = T; pieces = {200.0, 1600.0, 1047.63657-0.372589265*T^1+9.45304214E-4*T^2-6.02409443E-7*T^3+1.2858961E-10*T^4}; argunit = K; fununit = J/(kg*K)
  mat4: Common "Ag (Silver) (Johnson and Christy 1972: n,k 0.188-1.937 µm)" on domains 2, 4
    RefractiveIndex
      n = n_interp(c_const/freq)
      ki = k_interp(c_const/freq)
      int1: Interpolation "Refractive index"
        funcname = n_interp
        table = 
          {1.879E-7, 1.07}
          {1.916E-7, 1.1}
          {1.953e-07, 1.12}
          {1.993E-7, 1.14}
          {2.033E-7, 1.15}
          {2.073E-7, 1.18}
          {2.119e-07, 1.2}
          {2.164E-7, 1.22}
          {2.214E-7, 1.25}
          {2.262E-7, 1.26}
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        interp = piecewisecubic
        argunit = m
        fununit = 1
      int2: Interpolation "Refractive index, imaginary part"
        funcname = k_interp
        table = 
          {1.879E-7, 1.212}
          {1.916E-7, 1.232}
          {1.953e-07, 1.255}
          {1.993E-7, 1.277}
          {2.033E-7, 1.296}
          {2.073E-7, 1.312}
          {2.119e-07, 1.325}
          {2.164E-7, 1.336}
          {2.214E-7, 1.342}
          {2.262E-7, 1.344}
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        interp = piecewisecubic
        argunit = m
        fununit = 1
  mat5: Common "Diamond" on domains 5
    def "Basic"
      thermalexpansioncoefficient = alpha_p(pA,T)
      molarmass = 0.02897[kg/mol]
      bulkviscosity = muB(T)
      relpermeability = 1
      relpermittivity = 2.4^2
      dynamicviscosity = eta(T)
      ratioofspecificheat = 1.4
      electricconductivity = 0[S/m]
      heatcapacity = Cp(T)
      density = rho(pA,T)
      thermalconductivity = k(T)
      soundspeed = cs(T)
      eta: Piecewise | arg = T; pieces = {200.0, 1600.0, -8.38278E-7+8.35717342E-8*T^1-7.69429583E-11*T^2+4.6437266E-14*T^3-1.06585607E-17*T^4}; argunit = K; fununit = Pa*s
      Cp: Piecewise | arg = T; pieces = {200.0, 1600.0, 1047.63657-0.372589265*T^1+9.45304214E-4*T^2-6.02409443E-7*T^3+1.2858961E-10*T^4}; argunit = K; fununit = J/(kg*K)
      rho: Analytic | expr = pA*0.02897/R_const[K*mol/J]/T; args = {pA, T}; argunit = Pa,K; fununit = kg/m^3
      k: Piecewise | arg = T; pieces = {200.0, 1600.0, -0.00227583562+1.15480022E-4*T^1-7.90252856E-8*T^2+4.11702505E-11*T^3-7.43864331E-15*T^4}; argunit = K; fununit = W/(m*K)
      cs: Analytic | expr = sqrt(1.4*R_const[K*mol/J]/0.02897*T); args = T; argunit = K; fununit = m/s
      an1: Analytic | funcname = alpha_p; expr = -1/rho(pA,T)*d(rho(pA,T),T); args = {pA, T}; argunit = Pa,K; fununit = 1/K
      an2: Analytic "Analytic 2a" | funcname = muB; expr = 0.6*eta(T); args = T; argunit = K; fununit = Pa*s
    RefractiveIndex
      n = 2.4
      ki = 0
    NonlinearModel
      BA = (def.gamma+1)/2
    idealGas
      Rs = R_const/Mn
      heatcapacity = Cp(T)
      ratioofspecificheat = 1.4
      molarmass = 0.02897
      Cp: Piecewise | arg = T; pieces = {200.0, 1600.0, 1047.63657-0.372589265*T^1+9.45304214E-4*T^2-6.02409443E-7*T^3+1.2858961E-10*T^4}; argunit = K; fununit = J/(kg*K)

Physics
  ewfd: ElectromagneticWavesFrequencyDomain on all domains
    dependent variable E = {Ex, Ey, Ez}
    BackgroundField.SolveFor = scatteredField
    BackgroundField.Eb = {1[V/m]*exp(-1i*ewfd.k0*z), 0, 0}
    wee1: WaveEquationElectric (default)
    pec1: PerfectElectricConductor (default)
    init1: init "Initial Values 1" (default)
    wee2: WaveEquationElectric (disabled) on domains 4 | n_mat = userdef; n = n_Ag; ki_mat = userdef; ki = k_Ag
    sctr1: Scattering "Scattering Boundary Condition 1" on boundaries 1-4, 19, 20, 26, 29
      WaveType = SphericalWave
      Order = SecondOrder
    ffd1: FarFieldDomain on domains 1
      ffc1: FarFieldCalculation on boundaries 1-4, 19, 20, 26, 29

Mesh
  mesh1 "Mesh 1" (physics-controlled)
    size: MeshSizeDefault | hauto = 1

Studies
  std1 "Study 1"
    param: Parametric "Parametric Sweep" | pname = ht_Ag_antenna; plistarr = range(50 [nm],5 [nm],1000 [nm]); punit = m
    wave: Wavelength "Wavelength Domain" | punit = m; plist = lamb

Solver configurations
  sol1 "Solution 1" (study std1)
    v1: Variables "Dependent Variables 1"
    s1: Stationary "Stationary Solver 1"
      p1: Parametric | pname = lambda0; plistarr = lamb; punit = m; pcontinuationmode = no
      fc1: FullyCoupled | linsolver = i1
      i1: Iterative "Suggested Iterative Solver (ewfd)" | linsolver = bicgstab
        mg1: Multigrid
  sol2 "Parametric Solutions 1" (study std1)
  sol3 "Parametric Solutions 2" (study std1)

Datasets
  dset1: Solution | solution = sol1
  cpl1: CutPlane
    data = dset1
    planetype = general
    genpoints = {{0, 0, 0}, {0.999977, 0.00685383, 5.42101E-20}, {-2.59793E-4, 0.0379039, 0.999281}}
  cln1: CutLine3D | data = dset1; genpoints = {{0, 0, -7.5E-7}, {0, 0, 7.5E-7}}
  dset2: Solution | solution = sol2
  dset3: Solution | solution = sol3

Derived values
  gev1: EvalGlobal "Global Evaluation 1"
    data = dset3
    table = tbl1
    expr = {ewfd.k0^4/6/pi/epsilon0_const^2*p_sq/(pi*rdisk^2)/(1[V/m])^2, ewfd.k0^4/6/pi/epsilon0_const^2*m_sq/(pi*rdisk^2)/(1[V/m])^2, ewfd.k0^4/6/pi/epsilon0_const^2*eq_sq/(pi*rdisk^2)/120/(1[V/m])^2, ewfd.k0^4/6/pi/epsilon0_const^2*mq_sq/(pi*rdisk^2)/120/(1[V/m])^2, ewfd.k0^4/6/pi/epsilon0_const^2*(p_sq+m_sq+eq_sq/120+mq_sq/120)/(pi*rdisk^2)/(1[V/m])^2, }
    unit = {rad, rad, rad, rad, rad, }
    descr = {ED, MD, EQ, MQ, TOT, }
  gev2: EvalGlobal "Global Evaluation 2"
    data = dset3
    table = tbl2
    expr = {arg_p, arg_m, arg_eq, arg_mq}
    unit = {rad, rad, rad, rad}
    descr = {ED, MD, EQ, MQ}

Tables
  tbl1: Table
    // Global Evaluation 1
    ht_Ag_antenna (m) | lambda0 (m) | ED (rad) | MD (rad) | EQ (rad) | MQ (rad) | TOT (rad)
    5e-08 | 6.8e-07 | 1.67925 | 0.0997059 | 0.00266399 | 0.0134252 | 1.79504
    5.5e-08 | 6.8e-07 | 1.64533 | 0.125172 | 0.00578358 | 0.0125014 | 1.78879
    6e-08 | 6.8e-07 | 1.60707 | 0.152264 | 0.0117214 | 0.0114579 | 1.78251
    6.5e-08 | 6.8e-07 | 1.5637 | 0.180695 | 0.0221424 | 0.0103366 | 1.77687
    7e-08 | 6.8e-07 | 1.51566 | 0.209408 | 0.0387927 | 0.00918836 | 1.77305
    7.5e-08 | 6.8e-07 | 1.46492 | 0.237252 | 0.0637268 | 0.00806242 | 1.77396
    8e-08 | 6.8e-07 | 1.40964 | 0.263908 | 0.100644 | 0.00702084 | 1.78121
    8.5e-08 | 6.8e-07 | 1.35155 | 0.287635 | 0.152215 | 0.00610825 | 1.79751
    9e-08 | 6.8e-07 | 1.29056 | 0.307653 | 0.221478 | 0.00538214 | 1.82507
    9.5e-08 | 6.8e-07 | 1.2276 | 0.323113 | 0.311441 | 0.00489399 | 1.86705
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  rp1: Table "Directivity"
    // Radiation pattern
    θ (deg) | φ (deg) | Directivity | Directivity (dB)
    88.9888 | 0 | 4.86753 | 6.87308
  tbl2: Table
    // Global Evaluation 2
    ht_Ag_antenna (m) | lambda0 (m) | ED (rad) | MD (rad) | EQ (rad) | MQ (rad)
    5e-08 | 6.8e-07 | 1.5681 | 2.98903 | 1.15612 | 1.81909
    5.5e-08 | 6.8e-07 | 1.53436 | 2.97316 | 0.928713 | 1.81812
    6e-08 | 6.8e-07 | 1.50265 | 2.95771 | 0.797524 | 1.82556
    6.5e-08 | 6.8e-07 | 1.47254 | 2.94284 | 0.718351 | 1.8429
    7e-08 | 6.8e-07 | 1.44335 | 2.92806 | 0.672538 | 1.87186
    7.5e-08 | 6.8e-07 | 1.41441 | 2.91337 | 0.650115 | 1.91466
    8e-08 | 6.8e-07 | 1.38697 | 2.89875 | 0.642119 | 1.97602
    8.5e-08 | 6.8e-07 | 1.36002 | 2.88348 | 0.646312 | 2.05884
    9e-08 | 6.8e-07 | 1.33325 | 2.86669 | 0.661092 | 2.16609
    9.5e-08 | 6.8e-07 | 1.30688 | 2.8476 | 0.68411 | 2.29892
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
Plots
  pg1: PlotGroup3D "Electric Field (ewfd)" | data = dset1
    mslc1: Multislice | expr = ewfd.Ez; descr = Electric field, z component
  pg2: PlotGroup1D "1D Plot Group 2" | data = none
    tblp1: Table "Table Graph 1" | table = tbl1; xaxisdata = auto; plotcolumninput = manual
  pg3: PlotGroup3D "3D Plot Group 3" | data = dset1
    vol1: Volume "Farfield_volume_plot" (disabled) | expr = ewfd.normEfar; descr = Far-field norm
    rp1: RadiationPattern | data = dset1; expr = ewfd.normEfar; thetadisc = 45; phidisc = 90
  pg5: PolarGroup "Polar Plot Group 5" | data = dset1
    rp1: RadiationPattern | data = dset3; expr = ewfd.normEfar; phidisc = 360; normal = {0, -1, 0}
  pg6: PlotGroup3D "Electric Field (ewfd) 1" | data = dset2
    mslc1: Multislice | expr = ewfd.normE
  pg7: PolarGroup "2D Far Field (ewfd)" | data = dset2
    rp1: RadiationPattern | expr = ewfd.normEfar; phidisc = 180
  pg8: PlotGroup3D "3D Far Field (ewfd)" | data = dset2
    rp1: RadiationPattern
      data = dset2
      expr = ewfd.normEfar
      thetadisc = 90
      phidisc = 90
      directivity = on
      directivityexpr = ewfd.normEfar^2
      table = rp1
  pg9: PlotGroup3D "Electric Field (ewfd) 2" | data = dset3
    mslc1: Multislice | expr = ewfd.normE
  pg10: PolarGroup "2D Far Field (ewfd) 1" | data = dset3
    rp1: RadiationPattern | expr = ewfd.normEfar; phidisc = 180
  pg11: PlotGroup3D "3D Far Field (ewfd) 1" | data = dset3
    rp1: RadiationPattern
      expr = ewfd.normEfar
      thetadisc = 45
      phidisc = 45
      directivity = on
      directivityexpr = ewfd.normEfar^2
  pg12: PlotGroup1D "1D Plot Group 12" | data = none
    tblp1: Table "Table Graph 1" | table = tbl2; xaxisdata = 1; plotcolumninput = manual; plotcolumns = {3, 4, 5, 6}

Exports
  plot1: Plot
    filename = D:\Updated_documents\Documents\Research paper writeup\Mie_Scattering_Calculations_details\Results\Polar_plots\XZ_Radiation_pattern_Ag_ht_340nm_Ex_excitation.txt